# Capacitance is how much electric charge something can store when you apply a voltage across it.
# Current
# mVpp = millivolts peak-to-peak
# 3.3 V Domain
# Oscillator
# Load Capacitance
#
# * The crystal will oscillate at its specified frequency only if the  total effective capacitance seen across its terminals is 8 pF
Trace_OSC := 6*mil
# need 2 capacitors (15 pF caps)
#
# *One capacitor from XTAL_IN --> GND
#
# *One capacitor from XTAL_Out --> GND
#
# * Place them right next to the MCU pins (as close as possible)
#
# * keep traces short and equal length
# IMU
Trace_IMU := 6*mil
I_IMU_VDD := 7.5 mA = 0.0075 A
I_IMU_VDDIO := 7.14 mA = 0.00714 A
I_IMU := I_IMU_VDD + I_IMU_VDDIO = 0.01464 A  # Total Peak VDD and VDDIO
I_IMU_peak := (I_IMU*0.25) + I_IMU = 18.3 mA
# Lora
Trace_Lora := 6*mil
# dBm: 14
I_Lora := 115.5 mA
I_Lora_peak := (I_Lora*0.25) + I_Lora = 144.375 mA
# LDO_A
Trace_LDO_A_out := 6*mil
V_LDO_A_out := 3.3 V
I_LDO_A_out_max := 500 mA
Trace_LDO_A_in := 6*mil
I_LDO_A_out := I_IMU_peak + I_Lora_peak = 162.675 mA
I_LDO_A_Load := (I_LDO_A_out*0.25) + I_LDO_A_out = 203.344 mA
I_LDO_A_Load% := I_LDO_A_Load/I_LDO_A_out_max = 40.6688 %  # Max Load: 80 %
I_LDO_A_quiescent := 40 μA = 0.04 mA  # Quiescent current = Ground Current
V_LDO_A_in := 5 V
I_LDO_A_in := I_LDO_A_Load + I_LDO_A_quiescent = 203.384 mA
P_LDO_A_in := V_LDO_A_in*I_LDO_A_in = 1.01692 W
P_LDO_A_out := V_LDO_A_out*I_LDO_A_out = 0.536828 W
η_LDO := V_LDO_A_out/V_LDO_A_in = 66 %
P_LDO_A_loss := (V_LDO_A_in - V_LDO_A_out)*I_LDO_A_out = 0.276548 W
θ_JA_LDO_A := 92.5 °C/W  # Junction Temperature Rated on LDO
T_AMB_A := 134 °F = 56.6667 °C  # Ambient Temperature (Hotest Day in California)
T_j_A := T_AMB_A + (P_LDO_A_loss*θ_JA_LDO_A)
56.667 + (0.277*92.5) = 82.2895
T_j_recommended_A := 125 °C
T_j_max_A := 150 °C
# Barometer
Trace_Bar := 6*mil
I_Bar_peak := 0.26 mA
# Total Peak VDD and VDDIO
Ripple_VDD := 10*mVpp  # error: This variable is undefined.
# MCU
Trace_VDD := 6*mil
# add 20 percent
I_VDD := 60 mA = 0.06 A
I_VDD2 := 60 mA = 0.06 A
Trace_VDDA := 6*mil
I_VDD3 := 60 mA = 0.06 A
Trace_VREF := 6*mil
Trace_VDDUSB := 6*mil
I_VDD4 := 60 mA = 0.06 A
I_VDD5 := 60 mA = 0.06 A
Trace_VBAT := 6*mil
Trace_MCU := 10*mil
I_VDDA := 1.8 mA = 0.0018 A
I_VREF := 500 μA = 0.0005 A
I_VDD_VDDA_VREF := I_VDD + I_VDD2 + I_VDD3 + I_VDD4 + I_VDD5 + I_VDDA + I_VREF = 302.3 mA
I_VDDUSB := 25 mA = 0.025 A
I_VBAT := 15.5 μA = 0.0155 mA
I_MCU_peak := I_VDD_VDDA_VREF + I_VDDUSB + I_VBAT = 327.316 mA
# Output
V_MCU_GPIO := 3.3 V
I_MCU_GPIO := 25 mA
I_LED_peak := 20 mA
I_LED_typ := 10 mA
V_LED_Red_Yellow := 2.0 V
V_LED_Blue_Green_White := 3.0 V
R_LED_Red_Green := (V_MCU_GPIO - V_LED_Red_Yellow)/I_LED_typ = 130 Ω
R_LED_Blue_Green_White := (V_MCU_GPIO - V_LED_Blue_Green_White)/I_LED_typ = 30 Ω
# LDO_B
Trace_LDO_B_out := 12*mil
V_LDO_B_out := 3.3 V
I_LDO_B_out_max := 500 mA
Trace_LDO_B_in := 12*mil
I_LDO_B_out := I_Bar_peak + I_MCU_peak = 327.576 mA
I_LDO_B_Load := (I_LDO_B_out*0.25) + I_LDO_B_out = 409.469 mA
I_LDO_B_Load% := I_LDO_B_Load/I_LDO_B_out_max = 81.8939 %  # Max Load: 80%
I_LDO_B_quiescent := 40 μA = 0.04 mA  # Quiescent current = Ground Current
V_LDO_B_in := 5 V
I_LDO_B_in := I_LDO_B_Load + I_LDO_B_quiescent = 409.509 mA
P_LDO_B_in := V_LDO_B_in*I_LDO_B_in = 2.04755 W
P_LDO_B_out := V_LDO_B_out*I_LDO_B_out = 1.081 W
η_LDO_B := V_LDO_B_out/V_LDO_B_in = 66 %
P_LDO_B_loss := (V_LDO_B_in - V_LDO_B_out)*I_LDO_B_out = 0.556878 W
θ_JA_LDO_B := 92.5 °C/W  # Junction Temperature Rated on LDO
T_AMB_B := 134 °F = 56.6667 °C  # Ambient Temperature (Hotest Day in California)
T_AMB_B + (P_LDO_B_loss*θ_JA_LDO_B)
56.667 + (0.557*92.5) = 108.19
T_j_recommended_B := 125 °C
T_j_max_B := 150 °C
# 5.0 V Domain
# RF Receiver
Trace_RF := 6*mil
V_RF_in := 5.0 V
I_RF_typ := 30 mA = 0.03 A
I_RF_peak := 60 mA = 0.06 A
# Buck 5V
Trace_Buck_out := 12*mil
V_Buck_in_max := 18 V
I_Buck_out_max := 3 A
Trace_Buck_in := 6*mil
V_Buck_in := 14.8 V
V_Buck_out := 5 V
I_Buck_out := I_RF_peak + I_LDO_A_in + I_LDO_B_in = 672.893 mA
I_Buck_Load := (I_Buck_out*0.25) + I_Buck_out = 841.116 mA
I_Buck_Load% := I_Buck_Load/I_Buck_out_max = 28.0372 %  # Max Load: 80%
η_Buck := 90 %
# Based on graphs on Datasheet
P_Buck_out := V_Buck_out*I_Buck_out = 3.36447 W
P_Buck_in := P_Buck_out/(90 %) = 3.7383 W
P_Buck_loss := P_Buck_in - P_Buck_out = 0.37383 W
I_Buck_in := P_Buck_in/V_Buck_in = 252.588 mA
# AP62300TWU-7
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C1 := 10 μF
C32 := C1
C1_VRating := 50 V  # 25V 1000μF low-ESR cap
C2 := 22 μF
C2A := C2
C2B := C2
C2_Vrating := 16 V
C3 := 100 nF
C34 := C3 = 0.1 μF
C6_VRating := 16 V
C4 := 47 pF
C33 := C4
C5_VRating := 16 V
L1 := 6.8 μH
L1_ARating := 1 A  # also 3A
R1 := 158 kΩ
R11 := R1
R1_PRating := 0.1 W
R2_PRating := 0.063 W
R2 := 30.1 kΩ
R12 := R2
# 12.6 V Domain
# ESCs
# Thrust
Weight_drone := 3 lb = 1360.78 gm
Weight_battery := 406 gm
Weight := Weight_drone + Weight_battery = 3.89508 lb
Weight_Hover := Weight = 1766.78 gm
Weight_Ascend := 2*Weight_Hover = 3533.55 gm
Motor_Hover := Weight_Hover/4 = 441.694 gm
Motor_Ascend := Weight_Ascend/4 = 883.389 gm
# Power
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# Power: Hover
P_300g := 55.44 W
P_500g := 100.80 W
# Linear interpolation formula
P_442g := P_300g + (442 - 300)*((P_500g - P_300g)/(500 - 300)) = 87.6456 W
P_Hover_total := 4*P_442g = 350.582 W
# Power: Ascend
P_700g := 136.08 W
P_900g := 234.36 W
P_884g := P_700g + (884 - 700)*((P_900g - P_700g)/(900 - 700)) = 226.498 W  # Linear interpolation formula
P_Ascend_total := 4*P_884g = 905.99 W
# Power: Current
I_Hover_Motor_12.6 := P_442g/(12.6 V) = 6.956 A  # Max Case
I_Hover_Motor_11.1 := P_442g/(11.1 V) = 7.896 A  # Optimal Case
I_Hover_Motor_10.5 := P_442g/(10.5 V) = 8347.2 mA  # Worst Case
I_Hover_total_10.5 := 4*I_Hover_Motor_10.5 = 33.3888 A
I_Ascend_Motor_12.6 := P_884g/(12.6 V) = 17976 mA  # Max Case
I_Ascend_Motor_11.1 := P_884g/(11.1 V) = 20.4052 A  # Optimal Case
I_Ascend_Motor_10.5 := P_884g/(10.5 V) = 21571.2 mA  # Worst Case
I_Ascend_total_10.5 := 4*I_Ascend_Motor_10.5 = 86.2848 A
# Effiency
η_Hover := Motor_Hover/P_442g = 5.03955 gm/W
η_Ascend := Motor_Ascend/P_884g = 3.90021 gm/W
# Monitoring Circuit
Trace_MC := 6*mil
V_MC_in := 12.6 V
V_MC_out := 1.40 V
V_ref := 3.3 V
V_gnd := 0 V
Given
V_MC_out == V_MC_in*R_2/(R_1 + R_2)
Find(R_1) → 8.0*R_2
R_1 := 95.3/2*kΩ = 47.65 kΩ
R_2 := 10/2*kΩ = 5 kΩ
4.7
R_1/R_2 = 9.53
# use a 47.5 kΩ resistor for R1
#
# use a 4.99 kΩ resistor for R2
R_1 := 47.5 kΩ
R_2 := 4.7 kΩ
R_1/R_2 = 10.1064
V_MC_Good_in_max := 12.6 V
V_MC_Good_in := 11.4 V
V_MC_Good_cell_in := V_MC_Good_in/3 = 3.8 V  # Goood: 12.6 V to 11.4 V
V_MC_Warning_in := 10.5 V
V_MC_Warning_cell_in := V_MC_Warning_in/3 = 3.5 V  # Warning: 11.4 V to 10.5 V
# Critcial: 10.5 V <
V_MC_Good_out_max := V_MC_Good_in_max*(R_2/(R_1 + R_2)) = 1.13448 V
# Good: 1.134 V (max) - 1.026 V
V_MC_Good_out := V_MC_Good_in*(R_2/(R_1 + R_2)) = 1.02644 V
# Warning: 1.026 V - 0.945 V
V_MC_Warning_out := V_MC_Warning_in*(R_2/(R_1 + R_2)) = 0.945402 V
# Critical: 0.945 V <
I_MC := V_MC_in/(R_1 + R_2) = 0.241379 mA
I_MC20 := (I_MC*0.20) + I_MC = 0.000289655 A
# Battery
Weight_Battery := 406 gm = 0.895077 lb
I_Battery := 5300 mA*hr
I_Battery_A := 5.3 A
C_rating := 60
# Battery / ESCs: 12 AWG rated for 30 A  Continuous and 60 A Bursts
I_Battery_max := I_Battery_A*C_rating = 318 A
I_Bat_Hover_total := I_Hover_total_10.5 + I_Buck_in + I_MC = 33641.6 mA
Life_Hover_Battery := I_Battery/I_Bat_Hover_total = 9.45257 min
I_Bat_Ascend_total := I_Ascend_total_10.5 + I_Buck_in + I_MC = 86537.6 mA
Life_Ascend_Battery := I_Battery/I_Bat_Ascend_total = 3.6747 min
