# Capacitance is how much electric charge something can store when you apply a voltage across it.
# Current
# mVpp = millivolts peak-to-peak
# 3.3 V Domain
# Oscillator
# Load Capacitance
#
# * The crystal will oscillate at its specified frequency only if the  total effective capacitance seen across its terminals is 8 pF
Trace_OSC := 6*mil
# need 2 capacitors (15 pF caps)
#
# *One capacitor from XTAL_IN --> GND
#
# *One capacitor from XTAL_Out --> GND
#
# * Place them right next to the MCU pins (as close as possible)
#
# * keep traces short and equal length
# IMU
Trace_IMU := 6*mil
I_IMU_VDD := 12.3 mA = 0.0123 A
I_IMU_VDDIO := 12.3 mA = 0.0123 A
I_IMU := 12.3 mA = 0.0123 A  # Total Peak VDD and VDDIO
# Barometer
Trace_Bar := 6*mil
I_Bar_VDD := 730 μA = 0.00073 A
I__Bar_VDDIO := 0.73 mA = 0.00073 A
I_Bar := 0.73 mA  # Total Peak VDD and VDDIO
I_Bar20 := (I_Bar*0.20) + I_Bar = 0.000876 A
Ripple_VDD := 10*mVpp  # error: This variable is undefined.
# MCU
Trace_VDD := 6*mil
# add 20 percent
I_VDD := 60 mA = 0.06 A
I_VDD2 := 60 mA = 0.06 A
Trace_VDDA := 6*mil
I_VDD3 := 60 mA = 0.06 A
Trace_VREF := 6*mil
Trace_VDDUSB := 6*mil
I_VDD4 := 60 mA = 0.06 A
I_VDD5 := 60 mA = 0.06 A
Trace_VBAT := 6*mil
Trace_MCU := 10*mil
I_VDDA := 1.8 mA = 0.0018 A
I_VREF := 500 μA = 0.0005 A
I_VDD_VDDA_VREF := I_VDD + I_VDD2 + I_VDD3 + I_VDD4 + I_VDD5 + I_VDDA + I_VREF = 302.3 mA
I_VDDUSB := 25 mA = 0.025 A
I_VBAT := 15.5 μA = 0.0155 mA
I_MCU := I_VDD_VDDA_VREF + I_VDDUSB + I_VBAT = 0.327316 A
I_MCU20 := (I_MCU*0.20) + I_MCU = 0.392779 A
# Output
V_MCU_GPIO := 3.3 V
I_MCU_GPIO := 25 mA
I_LED_peak := 20 mA
I_LED_typ := 10 mA
V_LED_Red_Yellow := 2.0 V
V_LED_Blue_Green_White := 3.0 V
R_LED_Red_Green := (V_MCU_GPIO - V_LED_Red_Yellow)/I_LED_typ = 130 Ω
R_LED_Blue_Green_White := (V_MCU_GPIO - V_LED_Blue_Green_White)/I_LED_typ = 30 Ω
# LDO
Trace_LDO_out := 10*mil
V_LDO_out := 3.3 V
Trace_LDO_in := 12*mil
I_LDO_out := I_IMU + I_Bar + I_MCU = 340.346 mA
I_LDO_out20 := (I_LDO_out*0.20) + I_LDO_out = 0.408415 A
I_LDO_quiescent := 40 μA = 0.04 mA  # Quiescent current = Ground Current
V_LDO_in := 5 V
I_LDO_in := I_LDO_out + I_LDO_quiescent = 340.385 mA
I_LDO20_in := (I_LDO_in*0.20) + I_LDO_in = 0.408463 A
P_LDO_in := V_LDO_in*I_LDO_in = 1.70193 W
P_LDO_out := V_LDO_out*I_LDO_out = 1.12314 W
η_LDO := V_LDO_out/V_LDO_in = 66 %
P_LDO_loss := (V_LDO_in - V_LDO_out)*I_LDO_out = 0.578587 W
θ_JA_LDO := 92.5 °C/W  # Junction Temperature Rated on LDO
T_AMB := 134 °F = 56.6667 °C  # Ambient Temperature (Hotest Day in California)
T_j := T_AMB + (P_LDO_loss*θ_JA_LDO)
56.667 + (0.579*92.5) = 110.225
T_j_recommended := 125 °C
T_j_max := 150 °C
# 5.0 V Domain
# RF Receiver
Trace_RF := 6*mil
V_RF_in := 5.0 V
I_RF_typ := 30 mA = 0.03 A
I_RF_peak := 60 mA = 0.06 A
I_RF20 := (I_RF_peak*0.20) + I_RF_peak = 0.072 A
# Buck 5V
V_Buck_in_max := 18 V
Trace_Buck_out := 12*mil
V_Buck_in := 14.8 V
V_Buck_out := 5 V
Trace_Buck_in := 6*mil
I_Buck_out := I_RF_peak + I_LDO_in = 400.385 mA
I_Buck_out20 := (I_Buck_out*0.20) + I_Buck_out = 0.480463 A
η_Buck := 90 %
# Based on graphs on Datasheet
P_Buck_out := V_Buck_out*I_Buck_out = 2.00193 W
P_Buck_in := P_Buck_out/(90 %) = 2.22436 W
P_Buck_loss := P_Buck_in - P_Buck_out = 0.222436 W
I_Buck_in := P_Buck_in/V_Buck_in = 150.295 mA
I_Buck_in20 := (I_Buck_in*0.20) + I_Buck_in = 0.180354 A
# AP62300TWU-7
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C1 := 10 μF
C32 := C1
C1_VRating := 25 V  # TVS diode 15V
C6 := 100 nF
C34 := C6 = 0.1 μF
C6_VRating := 16 V  # 35V 1000μF low-ESR cap
L1 := 3.3 μH
L1_ARating := 1 A  # also 3A
C5 := 100 pF
C33 := C5
C5_VRating := 16 V
R1 := 56.2 kΩ
R11 := R1
R1_PRating := 0.1 W
R2_PRating := 0.063 W
R2 := 10 kΩ
R12 := R2
C2 := 22 μF
C2A := C2
C2B := C2
C2_Vrating := 16 V
# 14.8 V Domain
# ESCs
# Thrust
Weight := 3 lb = 1360.78 gm
Weight_Hover := Weight = 1360.78 gm
Weight_Ascend := 2*Weight_Hover = 2721.55 gm
Motor_Hover := Weight_Hover/4 = 340.194 gm
Motor_Ascend := Weight_Ascend/4 = 680.389 gm
# Power
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# Power: Hover
P_300g := 55.44 W
P_500g := 100.80 W
# Linear interpolation formula
P_340g := P_300g + (340 - 300)*((P_500g - P_300g)/(500 - 300)) = 64.512 W
P_Hover_total := 4*P_340g = 258.048 W
# Power: Ascend
P_500g = 100.8 W
P_700g := 136.08 W
P_680g := P_500g + (680 - 500)*((P_700g - P_500g)/(700 - 500)) = 132.552 W  # Linear interpolation formula
P_Ascend_total := 4*P_680g = 530.208 W
# Power: Current
I_Hover_Motor := P_340g/(14.8 V) = 4358.92 mA
I_Hover_total := 4*I_Hover_Motor = 17.4357 A
I_Ascend_Motor := P_680g/(14.8 V) = 8956.22 mA
I_Ascend_total := 4*I_Ascend_Motor = 35824.9 mA
# Effiency
η_Hover := Motor_Hover/P_340g = 5.27335 gm/W
η_Ascend := Motor_Ascend/P_680g = 5.13299 gm/W
# Monitoring Circuit
Trace_MC := 6*mil
V_MC_in := 16.8 V
V_MC_out := 1.40 V
V_ref := 3.3 V
V_gnd := 0 V
Given
V_MC_out == V_MC_in*R_2/(R_1 + R_2)
Find(R_1) → 11.0*R_2
R_1 := 95.3/2*kΩ = 47.65 kΩ
R_2 := 10/2*kΩ = 5 kΩ
4.7
R_1/R_2 = 9.53
# use a 47.5 kΩ resistor for R1
#
# use a 4.99 kΩ resistor for R2
R_1 := 47.5 kΩ
R_2 := 4.7 kΩ
R_1/R_2 = 10.1064
V_MC_Good_in_max := 16.8 V
V_MC_Good_in := 14.0 V
V_MC_Good_cell_in := V_MC_Good_in/4 = 3.5 V  # Goood: 16.8 V to 14.0V
V_MC_Warning_in := 13.2 V
V_MC_Warning_cell_in := V_MC_Warning_in/4 = 3.3 V  # Warning: 14.0 V to 13.2 V
# Critcial: 13.2 V <
V_MC_Good_out_max := V_MC_Good_in_max*(R_2/(R_1 + R_2)) = 1.51264 V
# Good: 1.513 V (max) - 1.261 V
V_MC_Good_out := V_MC_Good_in*(R_2/(R_1 + R_2)) = 1.26054 V
# Warning: 1.261 V - 1.189 V
V_MC_Warning_out := V_MC_Warning_in*(R_2/(R_1 + R_2)) = 1.18851 V
# Critical: 1.189 V >
I_MC := V_MC_in/(R_1 + R_2) = 0.321839 mA
I_MC20 := (I_MC*0.20) + I_MC = 0.000386207 A
# Battery
Weight_Battery := 608 gm = 1.34041 lb
I_Battery := 5000 mA*hr
I_Battery_A := 6.2 A
# Battery: 10 AWG rated for 30 Amps
C_rating := 70
# ESCs: 12 AWG rated for 20 Amps
I_Battery_max := I_Battery_A*C_rating = 434 A
I_Bat_Hover_total := I_Hover_total + I_Buck_in + I_MC = 17.5863 A
Life_Hover_Battery := I_Battery/I_Bat_Hover_total = 17.0587 min
I_Bat_Ascend_total := I_Ascend_total + I_Buck_in + I_MC = 35975.5 mA
Life_Ascend_Battery := I_Battery/I_Bat_Ascend_total = 8.33901 min
